*Heading
** Job name: Notch-UD Model name: Notch-UD
** Generated by: Abaqus/CAE 6.12-2
*Preprint, echo=NO, model=NO, history=NO, contact=NO
**
** PARTS
**
*Part, name=Part-1
*Node
      1, -0.981128931,   3.01960444,           0.
      2,  -1.44141984,   2.82894564,           0.
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*Element, type=C3D8R
   1,    1,  781,  986,  982, 4255, 5035, 5240, 5236
   2,  783,    3,  976,  958, 5037, 4257, 5230, 5212
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*Nset, nset=left
   63,   64,   65,   66,   67,   68
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*Nset, nset=right
   62,  111,  112,  113,  114,  115
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*Nset, nset=topsurf, generate
 4255,  8508,     1
*End Part
**
**
** ASSEMBLY
**
*Assembly, name=Assembly
**
*Instance, name=Part-1-1, part=Part-1
*End Instance
**
*End Assembly
**
** BOUNDARY CONDITIONS
**
** Name: fixleft Type: Displacement/Rotation
*Boundary
Part-1-1.left, 1, 1
Part-1-1.left, 2, 2
** Name: fixright Type: Displacement/Rotation
*Boundary
Part-1-1.right, 2, 2
** Name: sym Type: Displacement/Rotation
*Boundary
Part-1-1.topsurf, 3, 3
** ----------------------------------------------------------------
**
** STEP: tensile
**
*Step, name=tensile, inc=4000
*Static
0.01, 4., 1e-05, 0.01
**
** BOUNDARY CONDITIONS
**
** Name: pullright Type: Velocity/Angular velocity
*Boundary, type=VELOCITY
Part-1-1.right, 1, 1, 1.
**
** OUTPUT REQUESTS
**
*Restart, write, frequency=0
**
** FIELD OUTPUT: F-Output-1
**
*Output, field
*Node Output
RF, U
*Output, history, frequency=0
*End Step
